<?xml version="1.0"?>


<!--


  ****************** IMPORTANT NOTICES **********************

   This is an alpha version release of the DATCOM+ program for
   JSBSIM. Nothing, and I do mean NOTHING, as been checked to
   verify that the parameters, units, sign conventions, or
   basically anything else is correct. Your mileage may vary.

   ***********************************************************

   This file was generated by Datcom+, a superset of
    the USAF Digital DATCOM program.
   This file is considered an intermediary file in the
   DATCOM/JSBSim process. This file may be overwritten without
   warning, so any changes that you make in here may be lost.

   If you intend to use this file as it is and modify it, make
   sure that you take the necessary precautions to prevent it
   from being overwritten, like renaming it.


   ***********************************************************


   DISCLAIMER REQUIRED BY HQ USAF FOR PUBLIC RELEASE APPROVAL

   THIS SOFTWARE AND ANY ACCOMPANYING DOCUMENTATION
   IS RELEASED "AS IS".  THE U.S. GOVERNMENT MAKES NO
   WARRANTY OF ANY KIND, EXPRESS OR IMPLIED, CONCERNING
   THIS SOFTWARE AND ANY ACCOMPANYING DOCUMENTATION,
   INCLUDING, WITHOUT LIMITATION, ANY WARRANTIES OF
   MERCHANTABILITY OR FITNESS FOR A PARTICULAR PURPOSE.
   IN NO EVENT WILL THE U.S. GOVERNMENT BE LIABLE FOR ANY
   DAMAGES, INCLUDING LOST PROFITS, LOST SAVINGS OR OTHER
   INCIDENTAL OR CONSEQUENTIAL DAMAGES ARISING OUT OF THE
   USE, OR INABILITY TO USE, THIS SOFTWARE OR ANY
   ACCOMPANYING DOCUMENTATION, EVEN IF INFORMED IN ADVANCE
   OF THE POSSIBILITY OF SUCH DAMAGES.


   ***********************************************************
-->


<!-- **********************************************************************
        AERODYNAMICS
     **********************************************************************
-->


   <aerodynamics>

      <alphalimits unit="DEG">
         <min>  -16.00    </min>
         <max>   24.00    </max>
      </alphalimits>


      <!-- *************************
                Sign Conventions
           *************************

           Control displacements
                Stick    FWD  + / Aft -
                Stick    Left + / Right -
                Wheel    CCW  + / CW -
                Pedal    Left + / Right -
                Elevator trim Nose Up + / Nose down -

           Surfaces
                Elevator  TED + / TEU -
                R Ail     TED + / TEU -
                L Ail     TED + / TEU -
                Rudder    TEL + / TER -

           F&M, Accel, Rates, Displacements
                Pitch     Up  + / Down -
                Roll      Rgt + / Left -
                Yaw       Rgt + / Left -

           Other
                Alpha     Up  + / Down -
                Beta Wind in right ear + / Wind in left ear -
                Slip Ball right of center + / left of center -
      -->


      <!-- **************************************
                ASSUMPTIONS AND LIMITATIONS

           There is no interaction between deflected surfaces modeled
           so there is no change in elevator effects with the flaps
           deflected, for example.

           Terms known to be missing from DATCOM:
              Power effects
              Ground effects
              Cyr, CyDr, Cyda, ClDr, Cndr

           **************************************
      -->


      <!--
           The following ground effect tables are NOT generated
           by DATCOM, but provide representative effects.
           These terms are not currently used in this model.
      -->


      <function name="aero/function/ground-effect-factor-lift">
         <description>Change in lift due to ground effect factor</description>
         <product>
            <table>
               <independentVar lookup="row">aero/h_b-mac-ft</independentVar>
               <tableData>
                  0.0  1.203
                  0.1  1.127
                  0.15 1.090
                  0.2  1.073
                  0.3  1.046
                  0.4  1.055
                  0.5  1.019
                  0.6  1.013
                  0.7  1.008
                  0.8  1.006
                  0.9  1.003
                  1.0  1.002
                  1.1  1.0
               </tableData>
            </table>
         </product>
      </function>

      <function name="aero/function/ground-effect-factor-drag">
         <description>Change in drag due to ground effect</description>
         <product>
            <table>
               <independentVar lookup="row">aero/h_b-mac-ft</independentVar>
               <tableData>
                  0.0  0.480
                  0.1  0.515
                  0.15 0.629
                  0.2  0.709
                  0.3  0.815
                  0.4  0.882
                  0.5  0.928
                  0.6  0.962
                  0.7  0.988
                  0.8  1.0
                  0.9  1.0
                  1.0  1.0
                  1.1  1.0
               </tableData>
            </table>
         </product>
      </function>


<!-- ********************************************************************** -->


     <axis name="LIFT">


         <function name="aero/coefficient/CLwbh">
            <description>
               Lift due to alpha
               Increase in CL decreases Period and damping,Dutch Roll damping
               CL is low for landing
            </description>
            <product>
               <property>aero/function/ground-effect-factor-lift</property>
               <property>aero/qbar-psf</property>
               <property>metrics/Sw-sqft</property>
               <table>
                  <independentVar lookup="row">aero/alpha-deg</independentVar>
                  <tableData>
                       -16.00        -1.232
                       -8.000        -.8376
                       -6.000        -.6888
                       -4.000        -.5220
                       -2.000        -.3498
                         .000        -.1738
                        2.000         .4711E-02
                        4.000         .1837
                        8.000         .5331
                        9.000         .6191
                        10.00         .7032
                        12.00         .8573
                        14.00         1.011
                        16.00         1.138
                        18.00         1.240
                        19.00         1.282
                        20.00         1.315
                        21.00         1.341
                        22.00         1.375
                        24.00         1.421
                  </tableData>
               </table>
            </product>
         </function>

         <function name="aero/coefficient/CLq">
            <description>
               Basic Lift Coefficient due to pitch rate(per degree)
            </description>
            <product>
               <property>velocities/q-aero-rad_sec</property>
               <value>57.29577951</value>
               <property>aero/qbar-psf</property>
               <property>metrics/Sw-sqft</property>
               <property>aero/ci2vel</property>
               <table>
                  <independentVar lookup="row">aero/alpha-deg</independentVar>
                  <tableData>
                       -16.00         .1180
                       -8.000         .1180
                       -6.000         .1180
                       -4.000         .1180
                       -2.000         .1180
                         .000         .1180
                        2.000         .1180
                        4.000         .1180
                        8.000         .1180
                        9.000         .1180
                        10.00         .1180
                        12.00         .1180
                        14.00         .1180
                        16.00         .1180
                        18.00         .1180
                        19.00         .1180
                        20.00         .1180
                        21.00         .1180
                        22.00         .1180
                        24.00         .1180
                  </tableData>
               </table>
            </product>
         </function>

         <function name="aero/coefficient/CLad">
            <description>
               Basic Lift Coefficient due to AOA rate(per degree)
               Important contributor to Short-Period damping
               For low Cla, aircraft must land at high alpha
            </description>
            <product>
               <property>aero/alphadot-deg_sec</property>
               <property>aero/qbar-psf</property>
               <property>metrics/Sw-sqft</property>
               <property>aero/ci2vel</property>
               <table>
                  <independentVar lookup="row">aero/alpha-deg</independentVar>
                  <tableData>
                       -16.00         .1757E-01
                       -8.000         .1757E-01
                       -6.000         .1757E-01
                       -4.000         .1757E-01
                       -2.000         .1757E-01
                         .000         .1757E-01
                        2.000         .1757E-01
                        4.000         .1757E-01
                        8.000         .1757E-01
                        9.000         .1757E-01
                        10.00         .1747E-01
                        12.00         .1657E-01
                        14.00         .1757E-01
                        16.00         .1757E-01
                        18.00         .1757E-01
                        19.00         .1757E-01
                        20.00         .1757E-01
                        21.00         .1757E-01
                        22.00         .1757E-01
                        24.00         .1757E-01
                  </tableData>
               </table>
            </product>
         </function>

         <function name="aero/coefficient/CLdF1L">
            <description>
               Lift Coefficient due to Left Plain Flaps Deflection
               Positive surface deflection is trailing edge down
               Ultimately, we will feed this left flap pos
            </description>
            <product>
               <property>aero/qbar-psf</property>
               <property>metrics/Sw-sqft</property>
               <table>
                  <independentVar lookup="row">fcs/flap-pos-deg</independentVar>
                  <tableData>
                       -20.00        -.4673E-01
                       -15.00        -.4202E-01
                       -10.00        -.2870E-01
                       -5.000        -.1435E-01
                         .000          .000
                        5.000         .1435E-01
                        10.00         .2870E-01
                        13.00         .3699E-01
                        16.00         .4424E-01
                  </tableData>
               </table>
            </product>
         </function>

         <function name="aero/coefficient/CLdF1R">
            <description>
               Lift Coefficient due to Right Plain Flaps Deflection
               Positive surface deflection is trailing edge down
               Ultimately, we will feed this right flap pos
            </description>
            <product>
               <property>aero/qbar-psf</property>
               <property>metrics/Sw-sqft</property>
               <table>
                  <independentVar lookup="row">fcs/flap-pos-deg</independentVar>
                  <tableData>
                       -20.00        -.4673E-01
                       -15.00        -.4202E-01
                       -10.00        -.2870E-01
                       -5.000        -.1435E-01
                         .000          .000
                        5.000         .1435E-01
                        10.00         .2870E-01
                        13.00         .3699E-01
                        16.00         .4424E-01
                  </tableData>
               </table>
            </product>
         </function>

         <function name="aero/coefficient/CLdF2L">
            <description>
               Lift Coefficient due to Left Single Slotted Flaps Deflection
               Positive surface deflection is trailing edge down
               Ultimately, we will feed this left flap pos
            </description>
            <product>
               <property>aero/qbar-psf</property>
               <property>metrics/Sw-sqft</property>
               <table>
                  <independentVar lookup="row">fcs/flap-pos-deg</independentVar>
                  <tableData>
                         .000          .000
                        5.000         .4562E-01
                        10.00         .9089E-01
                        15.00         .1340
                        20.00         .1755
                        25.00         .2103
                        30.00         .2387
                        35.00         .2599
                        40.00         .2685
                  </tableData>
               </table>
            </product>
         </function>

         <function name="aero/coefficient/CLdF2R">
            <description>
               Lift Coefficient due to Right Single Slotted Flaps Deflection
               Positive surface deflection is trailing edge down
               Ultimately, we will feed this right flap pos
            </description>
            <product>
               <property>aero/qbar-psf</property>
               <property>metrics/Sw-sqft</property>
               <table>
                  <independentVar lookup="row">fcs/flap-pos-deg</independentVar>
                  <tableData>
                         .000          .000
                        5.000         .4562E-01
                        10.00         .9089E-01
                        15.00         .1340
                        20.00         .1755
                        25.00         .2103
                        30.00         .2387
                        35.00         .2599
                        40.00         .2685
                  </tableData>
               </table>
            </product>
         </function>

         <function name="aero/coefficient/CLdF6L">
            <description>
               Lift Coefficient due to Left Leading Edge Flaps Deflection
               Positive surface deflection is trailing edge down
               Ultimately, we will feed this left flap pos
            </description>
            <product>
               <property>aero/qbar-psf</property>
               <property>metrics/Sw-sqft</property>
               <table>
                  <independentVar lookup="row">fcs/leading-edge-flap-pos-deg</independentVar>
                  <tableData>
                         .000          .000
                        10.00         .6681E-03
                        20.00         .1336E-02
                        30.00         .2004E-02
                  </tableData>
               </table>
            </product>
         </function>

         <function name="aero/coefficient/CLdF6R">
            <description>
               Lift Coefficient due to Right Leading Edge Flaps Deflection
               Positive surface deflection is trailing edge down
               Ultimately, we will feed this right flap pos
            </description>
            <product>
               <property>aero/qbar-psf</property>
               <property>metrics/Sw-sqft</property>
               <table>
                  <independentVar lookup="row">fcs/leading-edge-flap-pos-deg</independentVar>
                  <tableData>
                         .000          .000
                        10.00         .6681E-03
                        20.00         .1336E-02
                        30.00         .2004E-02
                  </tableData>
               </table>
            </product>
         </function>

         <function name="aero/coefficient/CLdF7L">
            <description>
               Lift Coefficient due to Left Leading Edge Slats Deflection
               Positive surface deflection is trailing edge down
               Ultimately, we will feed this left flap pos
            </description>
            <product>
               <property>aero/qbar-psf</property>
               <property>metrics/Sw-sqft</property>
               <table>
                  <independentVar lookup="row">fcs/leading-edge-slat-pos-deg</independentVar>
                  <tableData>
                         .000          .000
                        5.000         .1515E-02
                        10.00         .3155E-02
                        20.00         .6561E-02
                  </tableData>
               </table>
            </product>
         </function>

         <function name="aero/coefficient/CLdF7R">
            <description>
               Lift Coefficient due to Right Leading Edge Slats Deflection
               Positive surface deflection is trailing edge down
               Ultimately, we will feed this right flap pos
            </description>
            <product>
               <property>aero/qbar-psf</property>
               <property>metrics/Sw-sqft</property>
               <table>
                  <independentVar lookup="row">fcs/leading-edge-slat-pos-deg</independentVar>
                  <tableData>
                         .000          .000
                        5.000         .1515E-02
                        10.00         .3155E-02
                        20.00         .6561E-02
                  </tableData>
               </table>
            </product>
         </function>

         <function name="aero/coefficient/CLdF9L">
            <description>
               Lift Coefficient due to Left Ground Spoilers Deflection
               Positive surface deflection is trailing edge up
               Ultimately, we will feed this left flap pos
            </description>
            <product>
               <property>aero/qbar-psf</property>
               <property>metrics/Sw-sqft</property>
               <table>
                  <independentVar lookup="row">fcs/ground-spoiler-pos-deg</independentVar>
                  <tableData>
                         .000          .000
                        10.00        -.2155E-01
                        20.00        -.3877E-01
                        30.00        -.4660E-01
                        40.00        -.5516E-01
                        50.00        -.6407E-01
                        60.00        -.7246E-01
                        70.00        -.8454E-01
                        80.00        -.9661E-01
                  </tableData>
               </table>
            </product>
         </function>

         <function name="aero/coefficient/CLdF9R">
            <description>
               Lift Coefficient due to Right Ground Spoilers Deflection
               Positive surface deflection is trailing edge up
               Ultimately, we will feed this right flap pos
            </description>
            <product>
               <property>aero/qbar-psf</property>
               <property>metrics/Sw-sqft</property>
               <table>
                  <independentVar lookup="row">fcs/ground-spoiler-pos-deg</independentVar>
                  <tableData>
                         .000          .000
                        10.00        -.2155E-01
                        20.00        -.3877E-01
                        30.00        -.4660E-01
                        40.00        -.5516E-01
                        50.00        -.6407E-01
                        60.00        -.7246E-01
                        70.00        -.8454E-01
                        80.00        -.9661E-01
                  </tableData>
               </table>
            </product>
         </function>

         <function name="aero/coefficient/CLdF10L">
            <description>
               Lift Coefficient due to Left Flight Spoilers Deflection
               Positive surface deflection is trailing edge up
               Ultimately, we will feed this left flap pos
            </description>
            <product>
               <property>aero/qbar-psf</property>
               <property>metrics/Sw-sqft</property>
               <table>
                  <independentVar lookup="row">fcs/flight-spoiler-pos-deg</independentVar>
                  <tableData>
                         .000          .000
                        10.00        -.5253E-01
                        20.00        -.9326E-01
                        25.00        -.1012
                        27.50        -.1052
                        30.00        -.1098
                        32.50        -.1149
                        35.00        -.1194
                        40.00        -.1297
                  </tableData>
               </table>
            </product>
         </function>

         <function name="aero/coefficient/CLdF10R">
            <description>
               Lift Coefficient due to Right Flight Spoilers Deflection
               Positive surface deflection is trailing edge up
               Ultimately, we will feed this right flap pos
            </description>
            <product>
               <property>aero/qbar-psf</property>
               <property>metrics/Sw-sqft</property>
               <table>
                  <independentVar lookup="row">fcs/flight-spoiler-pos-deg</independentVar>
                  <tableData>
                         .000          .000
                        10.00        -.5253E-01
                        20.00        -.9326E-01
                        25.00        -.1012
                        27.50        -.1052
                        30.00        -.1098
                        32.50        -.1149
                        35.00        -.1194
                        40.00        -.1297
                  </tableData>
               </table>
            </product>
         </function>

         <function name="aero/coefficient/CLDe">
            <description>
               Lift Coefficient due to Elevator Deflection
               Positive surface deflection is trailing edge down
            </description>
            <product>
               <property>aero/qbar-psf</property>
               <property>metrics/Sw-sqft</property>
               <table>
                  <independentVar lookup="row">fcs/elevator-pos-deg</independentVar>
                  <tableData>
                       -20.00        -.9347E-01
                       -15.00        -.8405E-01
                       -10.00        -.5739E-01
                       -5.000        -.2870E-01
                         .000         .5739E-04
                        5.000         .2870E-01
                        10.00         .5739E-01
                        13.00         .7398E-01
                        16.00         .8848E-01
                  </tableData>
               </table>
            </product>
         </function>

     </axis>


<!-- ********************************************************************** -->


     <axis name="DRAG">


         <function name="aero/coefficient/CD">
            <description>
               Basic Drag Coefficient
               Sense: Always positive
               Main contributor to Phugoid damping: Greater Cd, Better damping
            </description>
            <product>
               <property>aero/function/ground-effect-factor-lift</property>
               <property>aero/qbar-psf</property>
               <property>metrics/Sw-sqft</property>
               <table>
                  <independentVar lookup="row">aero/alpha-deg</independentVar>
                  <tableData>
                       -16.00         .9134E-01
                       -8.000         .4325E-01
                       -6.000         .3161E-01
                       -4.000         .2192E-01
                       -2.000         .1509E-01
                         .000         .1114E-01
                        2.000         .1024E-01
                        4.000         .1265E-01
                        8.000         .2711E-01
                        9.000         .3271E-01
                        10.00         .3905E-01
                        12.00         .5355E-01
                        14.00         .7231E-01
                        16.00         .9244E-01
                        18.00         .1137
                        19.00         .1246
                        20.00         .1354
                        21.00         .1461
                        22.00         .1588
                        24.00         .1831
                  </tableData>
               </table>
            </product>
         </function>

         <function name="aero/coefficient/CdDf1L">
            <description>
               Drag Coefficient due to Left Plain Flaps Deflection
               Positive surface deflection is trailing edge down
               Ultimately, we will feed this left flap pos
            </description>
            <product>
               <property>aero/qbar-psf</property>
               <property>metrics/Sw-sqft</property>
               <table>
                  <independentVar lookup="row">aero/alpha-deg</independentVar>
                  <independentVar lookup="column">fcs/flap-pos-deg</independentVar>
                  <tableData>
                                     -20.00        -15.00        -10.00        -5.000          .000         5.000         10.00         13.00         16.00
                       -16.00         .1101E-01     .9671E-02     .6153E-02     .2834E-02      .000        -.2348E-02    -.4211E-02    -.5066E-02    -.5681E-02
                       -8.000         .7915E-02     .6885E-02     .4251E-02     .1883E-02      .000        -.1397E-02    -.2309E-02    -.2614E-02    -.2748E-02
                       -6.000         .7141E-02     .6189E-02     .3775E-02     .1645E-02      .000        -.1159E-02    -.1833E-02    -.2001E-02    -.2015E-02
                       -4.000         .6366E-02     .5492E-02     .3299E-02     .1407E-02      .000        -.9215E-03    -.1357E-02    -.1388E-02    -.1282E-02
                       -2.000         .5592E-02     .4796E-02     .2824E-02     .1169E-02      .000        -.6837E-03    -.8819E-03    -.7751E-03    -.5487E-03
                         .000         .4817E-02     .4099E-02     .2348E-02     .9314E-03      .000        -.4459E-03    -.4063E-03    -.1621E-03     .1845E-03
                        2.000         .4043E-02     .3403E-02     .1873E-02     .6936E-03      .000        -.2081E-03     .6920E-04     .4508E-03     .9176E-03
                        4.000         .3269E-02     .2707E-02     .1397E-02     .4559E-03      .000         .2963E-04     .5448E-03     .1064E-02     .1651E-02
                        8.000         .1720E-02     .1314E-02     .4461E-03    -.1968E-04      .000         .5052E-03     .1496E-02     .2290E-02     .3117E-02
                        9.000         .1333E-02     .9655E-03     .2084E-03    -.1386E-03      .000         .6241E-03     .1734E-02     .2596E-02     .3484E-02
                        10.00         .9456E-03     .6173E-03    -.2941E-04    -.2575E-03      .000         .7430E-03     .1971E-02     .2903E-02     .3850E-02
                        12.00         .1713E-03    -.7909E-04    -.5050E-03    -.4952E-03      .000         .9807E-03     .2447E-02     .3516E-02     .4583E-02
                        14.00        -.6031E-03    -.7755E-03    -.9805E-03    -.7330E-03      .000         .1218E-02     .2922E-02     .4129E-02     .5317E-02
                        16.00        -.1377E-02    -.1472E-02    -.1456E-02    -.9708E-03      .000         .1456E-02     .3398E-02     .4742E-02     .6050E-02
                        18.00        -.2152E-02    -.2168E-02    -.1932E-02    -.1209E-02      .000         .1694E-02     .3874E-02     .5355E-02     .6783E-02
                        19.00        -.2539E-02    -.2517E-02    -.2169E-02    -.1327E-02      .000         .1813E-02     .4111E-02     .5661E-02     .7149E-02
                        20.00        -.2926E-02    -.2865E-02    -.2407E-02    -.1446E-02      .000         .1932E-02     .4349E-02     .5967E-02     .7516E-02
                        21.00        -.3313E-02    -.3213E-02    -.2645E-02    -.1565E-02      .000         .2051E-02     .4587E-02     .6274E-02     .7883E-02
                        22.00        -.3701E-02    -.3561E-02    -.2883E-02    -.1684E-02      .000         .2170E-02     .4825E-02     .6580E-02     .8249E-02
                        24.00        -.4475E-02    -.4258E-02    -.3358E-02    -.1922E-02      .000         .2407E-02     .5300E-02     .7193E-02     .8982E-02
                  </tableData>
               </table>
            </product>
         </function>

         <function name="aero/coefficient/CdDf1R">
            <description>
               Drag Coefficient due to Right Plain Flaps Deflection
               Positive surface deflection is trailing edge down
               Ultimately, we will feed this right flap pos
            </description>
            <product>
               <property>aero/qbar-psf</property>
               <property>metrics/Sw-sqft</property>
               <table>
                  <independentVar lookup="row">aero/alpha-deg</independentVar>
                  <independentVar lookup="column">fcs/flap-pos-deg</independentVar>
                  <tableData>
                                     -20.00        -15.00        -10.00        -5.000          .000         5.000         10.00         13.00         16.00
                       -16.00         .1101E-01     .9671E-02     .6153E-02     .2834E-02      .000        -.2348E-02    -.4211E-02    -.5066E-02    -.5681E-02
                       -8.000         .7915E-02     .6885E-02     .4251E-02     .1883E-02      .000        -.1397E-02    -.2309E-02    -.2614E-02    -.2748E-02
                       -6.000         .7141E-02     .6189E-02     .3775E-02     .1645E-02      .000        -.1159E-02    -.1833E-02    -.2001E-02    -.2015E-02
                       -4.000         .6366E-02     .5492E-02     .3299E-02     .1407E-02      .000        -.9215E-03    -.1357E-02    -.1388E-02    -.1282E-02
                       -2.000         .5592E-02     .4796E-02     .2824E-02     .1169E-02      .000        -.6837E-03    -.8819E-03    -.7751E-03    -.5487E-03
                         .000         .4817E-02     .4099E-02     .2348E-02     .9314E-03      .000        -.4459E-03    -.4063E-03    -.1621E-03     .1845E-03
                        2.000         .4043E-02     .3403E-02     .1873E-02     .6936E-03      .000        -.2081E-03     .6920E-04     .4508E-03     .9176E-03
                        4.000         .3269E-02     .2707E-02     .1397E-02     .4559E-03      .000         .2963E-04     .5448E-03     .1064E-02     .1651E-02
                        8.000         .1720E-02     .1314E-02     .4461E-03    -.1968E-04      .000         .5052E-03     .1496E-02     .2290E-02     .3117E-02
                        9.000         .1333E-02     .9655E-03     .2084E-03    -.1386E-03      .000         .6241E-03     .1734E-02     .2596E-02     .3484E-02
                        10.00         .9456E-03     .6173E-03    -.2941E-04    -.2575E-03      .000         .7430E-03     .1971E-02     .2903E-02     .3850E-02
                        12.00         .1713E-03    -.7909E-04    -.5050E-03    -.4952E-03      .000         .9807E-03     .2447E-02     .3516E-02     .4583E-02
                        14.00        -.6031E-03    -.7755E-03    -.9805E-03    -.7330E-03      .000         .1218E-02     .2922E-02     .4129E-02     .5317E-02
                        16.00        -.1377E-02    -.1472E-02    -.1456E-02    -.9708E-03      .000         .1456E-02     .3398E-02     .4742E-02     .6050E-02
                        18.00        -.2152E-02    -.2168E-02    -.1932E-02    -.1209E-02      .000         .1694E-02     .3874E-02     .5355E-02     .6783E-02
                        19.00        -.2539E-02    -.2517E-02    -.2169E-02    -.1327E-02      .000         .1813E-02     .4111E-02     .5661E-02     .7149E-02
                        20.00        -.2926E-02    -.2865E-02    -.2407E-02    -.1446E-02      .000         .1932E-02     .4349E-02     .5967E-02     .7516E-02
                        21.00        -.3313E-02    -.3213E-02    -.2645E-02    -.1565E-02      .000         .2051E-02     .4587E-02     .6274E-02     .7883E-02
                        22.00        -.3701E-02    -.3561E-02    -.2883E-02    -.1684E-02      .000         .2170E-02     .4825E-02     .6580E-02     .8249E-02
                        24.00        -.4475E-02    -.4258E-02    -.3358E-02    -.1922E-02      .000         .2407E-02     .5300E-02     .7193E-02     .8982E-02
                  </tableData>
               </table>
            </product>
         </function>

         <function name="aero/coefficient/CdDf2L">
            <description>
               Drag Coefficient due to Left Single Slotted Flaps Deflection
               Positive surface deflection is trailing edge down
               Ultimately, we will feed this left flap pos
            </description>
            <product>
               <property>aero/qbar-psf</property>
               <property>metrics/Sw-sqft</property>
               <table>
                  <independentVar lookup="row">aero/alpha-deg</independentVar>
                  <independentVar lookup="column">fcs/flap-pos-deg</independentVar>
                  <tableData>
                                       .000         5.000         10.00         15.00         20.00         25.00         30.00         35.00         40.00
                       -16.00          .000        -.5858E-02    -.1116E-01    -.1574E-01    -.1971E-01    -.2272E-01    -.2495E-01    -.2649E-01    -.2708E-01
                       -8.000          .000        -.3488E-02    -.6440E-02    -.8777E-02    -.1059E-01    -.1179E-01    -.1255E-01    -.1298E-01    -.1312E-01
                       -6.000          .000        -.2896E-02    -.5260E-02    -.7038E-02    -.8316E-02    -.9060E-02    -.9445E-02    -.9601E-02    -.9632E-02
                       -4.000          .000        -.2304E-02    -.4079E-02    -.5298E-02    -.6038E-02    -.6329E-02    -.6344E-02    -.6224E-02    -.6143E-02
                       -2.000          .000        -.1711E-02    -.2899E-02    -.3559E-02    -.3759E-02    -.3598E-02    -.3242E-02    -.2846E-02    -.2654E-02
                         .000          .000        -.1119E-02    -.1719E-02    -.1819E-02    -.1480E-02    -.8667E-03    -.1411E-03     .5310E-03     .8348E-03
                        2.000          .000        -.5262E-03    -.5387E-03    -.7925E-04     .7981E-03     .1864E-02     .2960E-02     .3908E-02     .4324E-02
                        4.000          .000         .6629E-04     .6416E-03     .1660E-02     .3077E-02     .4595E-02     .6061E-02     .7286E-02     .7813E-02
                        8.000          .000         .1251E-02     .3002E-02     .5140E-02     .7634E-02     .1006E-01     .1226E-01     .1404E-01     .1479E-01
                        9.000          .000         .1547E-02     .3592E-02     .6009E-02     .8773E-02     .1142E-01     .1381E-01     .1573E-01     .1654E-01
                        10.00          .000         .1844E-02     .4182E-02     .6879E-02     .9912E-02     .1279E-01     .1537E-01     .1742E-01     .1828E-01
                        12.00          .000         .2436E-02     .5362E-02     .8619E-02     .1219E-01     .1552E-01     .1847E-01     .2079E-01     .2177E-01
                        14.00          .000         .3029E-02     .6543E-02     .1036E-01     .1447E-01     .1825E-01     .2157E-01     .2417E-01     .2526E-01
                        16.00          .000         .3621E-02     .7723E-02     .1210E-01     .1675E-01     .2098E-01     .2467E-01     .2755E-01     .2875E-01
                        18.00          .000         .4213E-02     .8903E-02     .1384E-01     .1903E-01     .2371E-01     .2777E-01     .3093E-01     .3224E-01
                        19.00          .000         .4510E-02     .9493E-02     .1471E-01     .2017E-01     .2508E-01     .2932E-01     .3262E-01     .3398E-01
                        20.00          .000         .4806E-02     .1008E-01     .1558E-01     .2131E-01     .2644E-01     .3087E-01     .3430E-01     .3572E-01
                        21.00          .000         .5102E-02     .1067E-01     .1645E-01     .2244E-01     .2781E-01     .3242E-01     .3599E-01     .3747E-01
                        22.00          .000         .5398E-02     .1126E-01     .1732E-01     .2358E-01     .2918E-01     .3397E-01     .3768E-01     .3921E-01
                        24.00          .000         .5991E-02     .1244E-01     .1906E-01     .2586E-01     .3191E-01     .3707E-01     .4106E-01     .4270E-01
                  </tableData>
               </table>
            </product>
         </function>

         <function name="aero/coefficient/CdDf2R">
            <description>
               Drag Coefficient due to Right Single Slotted Flaps Deflection
               Positive surface deflection is trailing edge down
               Ultimately, we will feed this right flap pos
            </description>
            <product>
               <property>aero/qbar-psf</property>
               <property>metrics/Sw-sqft</property>
               <table>
                  <independentVar lookup="row">aero/alpha-deg</independentVar>
                  <independentVar lookup="column">fcs/flap-pos-deg</independentVar>
                  <tableData>
                                       .000         5.000         10.00         15.00         20.00         25.00         30.00         35.00         40.00
                       -16.00          .000        -.5858E-02    -.1116E-01    -.1574E-01    -.1971E-01    -.2272E-01    -.2495E-01    -.2649E-01    -.2708E-01
                       -8.000          .000        -.3488E-02    -.6440E-02    -.8777E-02    -.1059E-01    -.1179E-01    -.1255E-01    -.1298E-01    -.1312E-01
                       -6.000          .000        -.2896E-02    -.5260E-02    -.7038E-02    -.8316E-02    -.9060E-02    -.9445E-02    -.9601E-02    -.9632E-02
                       -4.000          .000        -.2304E-02    -.4079E-02    -.5298E-02    -.6038E-02    -.6329E-02    -.6344E-02    -.6224E-02    -.6143E-02
                       -2.000          .000        -.1711E-02    -.2899E-02    -.3559E-02    -.3759E-02    -.3598E-02    -.3242E-02    -.2846E-02    -.2654E-02
                         .000          .000        -.1119E-02    -.1719E-02    -.1819E-02    -.1480E-02    -.8667E-03    -.1411E-03     .5310E-03     .8348E-03
                        2.000          .000        -.5262E-03    -.5387E-03    -.7925E-04     .7981E-03     .1864E-02     .2960E-02     .3908E-02     .4324E-02
                        4.000          .000         .6629E-04     .6416E-03     .1660E-02     .3077E-02     .4595E-02     .6061E-02     .7286E-02     .7813E-02
                        8.000          .000         .1251E-02     .3002E-02     .5140E-02     .7634E-02     .1006E-01     .1226E-01     .1404E-01     .1479E-01
                        9.000          .000         .1547E-02     .3592E-02     .6009E-02     .8773E-02     .1142E-01     .1381E-01     .1573E-01     .1654E-01
                        10.00          .000         .1844E-02     .4182E-02     .6879E-02     .9912E-02     .1279E-01     .1537E-01     .1742E-01     .1828E-01
                        12.00          .000         .2436E-02     .5362E-02     .8619E-02     .1219E-01     .1552E-01     .1847E-01     .2079E-01     .2177E-01
                        14.00          .000         .3029E-02     .6543E-02     .1036E-01     .1447E-01     .1825E-01     .2157E-01     .2417E-01     .2526E-01
                        16.00          .000         .3621E-02     .7723E-02     .1210E-01     .1675E-01     .2098E-01     .2467E-01     .2755E-01     .2875E-01
                        18.00          .000         .4213E-02     .8903E-02     .1384E-01     .1903E-01     .2371E-01     .2777E-01     .3093E-01     .3224E-01
                        19.00          .000         .4510E-02     .9493E-02     .1471E-01     .2017E-01     .2508E-01     .2932E-01     .3262E-01     .3398E-01
                        20.00          .000         .4806E-02     .1008E-01     .1558E-01     .2131E-01     .2644E-01     .3087E-01     .3430E-01     .3572E-01
                        21.00          .000         .5102E-02     .1067E-01     .1645E-01     .2244E-01     .2781E-01     .3242E-01     .3599E-01     .3747E-01
                        22.00          .000         .5398E-02     .1126E-01     .1732E-01     .2358E-01     .2918E-01     .3397E-01     .3768E-01     .3921E-01
                        24.00          .000         .5991E-02     .1244E-01     .1906E-01     .2586E-01     .3191E-01     .3707E-01     .4106E-01     .4270E-01
                  </tableData>
               </table>
            </product>
         </function>

         <function name="aero/coefficient/CdDf6L">
            <description>
               Drag Coefficient due to Left Leading Edge Flaps Deflection
               Positive surface deflection is trailing edge down
               Ultimately, we will feed this left flap pos
            </description>
            <product>
               <property>aero/qbar-psf</property>
               <property>metrics/Sw-sqft</property>
               <table>
                  <independentVar lookup="row">aero/alpha-deg</independentVar>
                  <independentVar lookup="column">fcs/leading-edge-flap-pos-deg</independentVar>
                  <tableData>
                                       .000         10.00         20.00         30.00
                       -16.00          .000        -.7899E-04    -.1579E-03    -.2367E-03
                       -8.000          .000        -.4836E-04    -.9663E-04    -.1448E-03
                       -6.000          .000        -.4071E-04    -.8132E-04    -.1218E-03
                       -4.000          .000        -.3305E-04    -.6600E-04    -.9887E-04
                       -2.000          .000        -.2539E-04    -.5070E-04    -.7590E-04
                         .000          .000        -.1774E-04    -.3538E-04    -.5293E-04
                        2.000          .000        -.1008E-04    -.2007E-04    -.2997E-04
                        4.000          .000        -.2428E-05    -.4761E-05    -.7000E-05
                        8.000          .000         .1288E-04     .2586E-04     .3893E-04
                        9.000          .000         .1671E-04     .3352E-04     .5042E-04
                        10.00          .000         .2054E-04     .4117E-04     .6190E-04
                        12.00          .000         .2820E-04     .5648E-04     .8487E-04
                        14.00          .000         .3585E-04     .7180E-04     .1078E-03
                        16.00          .000         .4351E-04     .8711E-04     .1308E-03
                        18.00          .000         .5116E-04     .1024E-03     .1538E-03
                        19.00          .000         .5499E-04     .1101E-03     .1653E-03
                        20.00          .000         .5883E-04     .1177E-03     .1767E-03
                        21.00          .000         .6265E-04     .1254E-03     .1882E-03
                        22.00          .000         .6648E-04     .1330E-03     .1997E-03
                        24.00          .000         .7411E-04     .1483E-03     .2227E-03
                  </tableData>
               </table>
            </product>
         </function>

         <function name="aero/coefficient/CdDf6R">
            <description>
               Drag Coefficient due to Right Leading Edge Flaps Deflection
               Positive surface deflection is trailing edge down
               Ultimately, we will feed this right flap pos
            </description>
            <product>
               <property>aero/qbar-psf</property>
               <property>metrics/Sw-sqft</property>
               <table>
                  <independentVar lookup="row">aero/alpha-deg</independentVar>
                  <independentVar lookup="column">fcs/leading-edge-flap-pos-deg</independentVar>
                  <tableData>
                                       .000         10.00         20.00         30.00
                       -16.00          .000        -.7899E-04    -.1579E-03    -.2367E-03
                       -8.000          .000        -.4836E-04    -.9663E-04    -.1448E-03
                       -6.000          .000        -.4071E-04    -.8132E-04    -.1218E-03
                       -4.000          .000        -.3305E-04    -.6600E-04    -.9887E-04
                       -2.000          .000        -.2539E-04    -.5070E-04    -.7590E-04
                         .000          .000        -.1774E-04    -.3538E-04    -.5293E-04
                        2.000          .000        -.1008E-04    -.2007E-04    -.2997E-04
                        4.000          .000        -.2428E-05    -.4761E-05    -.7000E-05
                        8.000          .000         .1288E-04     .2586E-04     .3893E-04
                        9.000          .000         .1671E-04     .3352E-04     .5042E-04
                        10.00          .000         .2054E-04     .4117E-04     .6190E-04
                        12.00          .000         .2820E-04     .5648E-04     .8487E-04
                        14.00          .000         .3585E-04     .7180E-04     .1078E-03
                        16.00          .000         .4351E-04     .8711E-04     .1308E-03
                        18.00          .000         .5116E-04     .1024E-03     .1538E-03
                        19.00          .000         .5499E-04     .1101E-03     .1653E-03
                        20.00          .000         .5883E-04     .1177E-03     .1767E-03
                        21.00          .000         .6265E-04     .1254E-03     .1882E-03
                        22.00          .000         .6648E-04     .1330E-03     .1997E-03
                        24.00          .000         .7411E-04     .1483E-03     .2227E-03
                  </tableData>
               </table>
            </product>
         </function>

         <function name="aero/coefficient/CdDf7L">
            <description>
               Drag Coefficient due to Left Leading Edge Slats Deflection
               Positive surface deflection is trailing edge down
               Ultimately, we will feed this left flap pos
            </description>
            <product>
               <property>aero/qbar-psf</property>
               <property>metrics/Sw-sqft</property>
               <table>
                  <independentVar lookup="row">aero/alpha-deg</independentVar>
                  <independentVar lookup="column">fcs/leading-edge-slat-pos-deg</independentVar>
                  <tableData>
                                       .000         5.000         10.00         20.00
                       -16.00          .000         .5000E-30     .5000E-30     .5000E-30
                       -8.000          .000         .5000E-30     .5000E-30     .5000E-30
                       -6.000          .000         .5000E-30     .5000E-30     .5000E-30
                       -4.000          .000         .5000E-30     .5000E-30     .5000E-30
                       -2.000          .000         .5000E-30     .5000E-30     .5000E-30
                         .000          .000         .5000E-30     .5000E-30     .5000E-30
                        2.000          .000         .5000E-30     .5000E-30     .5000E-30
                        4.000          .000         .5000E-30     .5000E-30     .5000E-30
                        8.000          .000         .5000E-30     .5000E-30     .5000E-30
                        9.000          .000         .5000E-30     .5000E-30     .5000E-30
                        10.00          .000         .5000E-30     .5000E-30     .5000E-30
                        12.00          .000         .5000E-30     .5000E-30     .5000E-30
                        14.00          .000         .5000E-30     .5000E-30     .5000E-30
                        16.00          .000         .5000E-30     .5000E-30     .5000E-30
                        18.00          .000         .5000E-30     .5000E-30     .5000E-30
                        19.00          .000         .5000E-30     .5000E-30     .5000E-30
                        20.00          .000         .5000E-30     .5000E-30     .5000E-30
                        21.00          .000         .5000E-30     .5000E-30     .5000E-30
                        22.00          .000         .5000E-30     .5000E-30     .5000E-30
                        24.00          .000         .5000E-30     .5000E-30     .5000E-30
                  </tableData>
               </table>
            </product>
         </function>

         <function name="aero/coefficient/CdDf7R">
            <description>
               Drag Coefficient due to Right Leading Edge Slats Deflection
               Positive surface deflection is trailing edge down
               Ultimately, we will feed this right flap pos
            </description>
            <product>
               <property>aero/qbar-psf</property>
               <property>metrics/Sw-sqft</property>
               <table>
                  <independentVar lookup="row">aero/alpha-deg</independentVar>
                  <independentVar lookup="column">fcs/leading-edge-slat-pos-deg</independentVar>
                  <tableData>
                                       .000         5.000         10.00         20.00
                       -16.00          .000         .5000E-30     .5000E-30     .5000E-30
                       -8.000          .000         .5000E-30     .5000E-30     .5000E-30
                       -6.000          .000         .5000E-30     .5000E-30     .5000E-30
                       -4.000          .000         .5000E-30     .5000E-30     .5000E-30
                       -2.000          .000         .5000E-30     .5000E-30     .5000E-30
                         .000          .000         .5000E-30     .5000E-30     .5000E-30
                        2.000          .000         .5000E-30     .5000E-30     .5000E-30
                        4.000          .000         .5000E-30     .5000E-30     .5000E-30
                        8.000          .000         .5000E-30     .5000E-30     .5000E-30
                        9.000          .000         .5000E-30     .5000E-30     .5000E-30
                        10.00          .000         .5000E-30     .5000E-30     .5000E-30
                        12.00          .000         .5000E-30     .5000E-30     .5000E-30
                        14.00          .000         .5000E-30     .5000E-30     .5000E-30
                        16.00          .000         .5000E-30     .5000E-30     .5000E-30
                        18.00          .000         .5000E-30     .5000E-30     .5000E-30
                        19.00          .000         .5000E-30     .5000E-30     .5000E-30
                        20.00          .000         .5000E-30     .5000E-30     .5000E-30
                        21.00          .000         .5000E-30     .5000E-30     .5000E-30
                        22.00          .000         .5000E-30     .5000E-30     .5000E-30
                        24.00          .000         .5000E-30     .5000E-30     .5000E-30
                  </tableData>
               </table>
            </product>
         </function>

         <function name="aero/coefficient/CdDf9L">
            <description>
               Drag Coefficient due to Left Ground Spoilers Deflection
               Positive surface deflection is trailing edge up
               Ultimately, we will feed this left flap pos
            </description>
            <product>
               <property>aero/qbar-psf</property>
               <property>metrics/Sw-sqft</property>
               <table>
                  <independentVar lookup="row">aero/alpha-deg</independentVar>
                  <independentVar lookup="column">fcs/ground-spoiler-pos-deg</independentVar>
                  <tableData>
                                       .000         10.00         20.00         30.00         40.00         50.00         60.00         70.00         80.00
                       -16.00          .000         .2665E-02     .4866E-02     .5888E-02     .7020E-02     .8217E-02     .9359E-02     .1103E-01     .1273E-01
                       -8.000          .000         .1652E-02     .3044E-02     .3698E-02     .4429E-02     .5207E-02     .5955E-02     .7058E-02     .8194E-02
                       -6.000          .000         .1399E-02     .2589E-02     .3151E-02     .3781E-02     .4454E-02     .5103E-02     .6065E-02     .7059E-02
                       -4.000          .000         .1145E-02     .2133E-02     .2603E-02     .3133E-02     .3701E-02     .4252E-02     .5072E-02     .5924E-02
                       -2.000          .000         .8921E-03     .1678E-02     .2056E-02     .2485E-02     .2949E-02     .3401E-02     .4079E-02     .4789E-02
                         .000          .000         .6389E-03     .1222E-02     .1509E-02     .1837E-02     .2196E-02     .2550E-02     .3086E-02     .3654E-02
                        2.000          .000         .3857E-03     .7666E-03     .9611E-03     .1189E-02     .1443E-02     .1699E-02     .2093E-02     .2519E-02
                        4.000          .000         .1325E-03     .3111E-03     .4137E-03     .5411E-03     .6908E-03     .8475E-03     .1100E-02     .1384E-02
                        8.000          .000        -.3739E-03    -.5999E-03    -.6812E-03    -.7548E-03    -.8145E-03    -.8549E-03    -.8861E-03    -.8855E-03
                        9.000          .000        -.5005E-03    -.8276E-03    -.9549E-03    -.1079E-02    -.1191E-02    -.1280E-02    -.1383E-02    -.1453E-02
                        10.00          .000        -.6271E-03    -.1055E-02    -.1229E-02    -.1403E-02    -.1567E-02    -.1706E-02    -.1879E-02    -.2020E-02
                        12.00          .000        -.8803E-03    -.1511E-02    -.1776E-02    -.2051E-02    -.2320E-02    -.2557E-02    -.2872E-02    -.3155E-02
                        14.00          .000        -.1134E-02    -.1966E-02    -.2323E-02    -.2699E-02    -.3072E-02    -.3408E-02    -.3865E-02    -.4290E-02
                        16.00          .000        -.1387E-02    -.2422E-02    -.2871E-02    -.3346E-02    -.3825E-02    -.4260E-02    -.4858E-02    -.5425E-02
                        18.00          .000        -.1640E-02    -.2877E-02    -.3418E-02    -.3994E-02    -.4578E-02    -.5111E-02    -.5851E-02    -.6560E-02
                        19.00          .000        -.1767E-02    -.3105E-02    -.3692E-02    -.4318E-02    -.4954E-02    -.5536E-02    -.6348E-02    -.7128E-02
                        20.00          .000        -.1893E-02    -.3333E-02    -.3966E-02    -.4642E-02    -.5330E-02    -.5962E-02    -.6844E-02    -.7695E-02
                        21.00          .000        -.2020E-02    -.3561E-02    -.4239E-02    -.4966E-02    -.5707E-02    -.6388E-02    -.7341E-02    -.8262E-02
                        22.00          .000        -.2146E-02    -.3788E-02    -.4513E-02    -.5290E-02    -.6083E-02    -.6813E-02    -.7837E-02    -.8830E-02
                        24.00          .000        -.2400E-02    -.4244E-02    -.5061E-02    -.5938E-02    -.6836E-02    -.7664E-02    -.8831E-02    -.9965E-02
                  </tableData>
               </table>
            </product>
         </function>

         <function name="aero/coefficient/CdDf9R">
            <description>
               Drag Coefficient due to Right Ground Spoilers Deflection
               Positive surface deflection is trailing edge up
               Ultimately, we will feed this right flap pos
            </description>
            <product>
               <property>aero/qbar-psf</property>
               <property>metrics/Sw-sqft</property>
               <table>
                  <independentVar lookup="row">aero/alpha-deg</independentVar>
                  <independentVar lookup="column">fcs/ground-spoiler-pos-deg</independentVar>
                  <tableData>
                                       .000         10.00         20.00         30.00         40.00         50.00         60.00         70.00         80.00
                       -16.00          .000         .2665E-02     .4866E-02     .5888E-02     .7020E-02     .8217E-02     .9359E-02     .1103E-01     .1273E-01
                       -8.000          .000         .1652E-02     .3044E-02     .3698E-02     .4429E-02     .5207E-02     .5955E-02     .7058E-02     .8194E-02
                       -6.000          .000         .1399E-02     .2589E-02     .3151E-02     .3781E-02     .4454E-02     .5103E-02     .6065E-02     .7059E-02
                       -4.000          .000         .1145E-02     .2133E-02     .2603E-02     .3133E-02     .3701E-02     .4252E-02     .5072E-02     .5924E-02
                       -2.000          .000         .8921E-03     .1678E-02     .2056E-02     .2485E-02     .2949E-02     .3401E-02     .4079E-02     .4789E-02
                         .000          .000         .6389E-03     .1222E-02     .1509E-02     .1837E-02     .2196E-02     .2550E-02     .3086E-02     .3654E-02
                        2.000          .000         .3857E-03     .7666E-03     .9611E-03     .1189E-02     .1443E-02     .1699E-02     .2093E-02     .2519E-02
                        4.000          .000         .1325E-03     .3111E-03     .4137E-03     .5411E-03     .6908E-03     .8475E-03     .1100E-02     .1384E-02
                        8.000          .000        -.3739E-03    -.5999E-03    -.6812E-03    -.7548E-03    -.8145E-03    -.8549E-03    -.8861E-03    -.8855E-03
                        9.000          .000        -.5005E-03    -.8276E-03    -.9549E-03    -.1079E-02    -.1191E-02    -.1280E-02    -.1383E-02    -.1453E-02
                        10.00          .000        -.6271E-03    -.1055E-02    -.1229E-02    -.1403E-02    -.1567E-02    -.1706E-02    -.1879E-02    -.2020E-02
                        12.00          .000        -.8803E-03    -.1511E-02    -.1776E-02    -.2051E-02    -.2320E-02    -.2557E-02    -.2872E-02    -.3155E-02
                        14.00          .000        -.1134E-02    -.1966E-02    -.2323E-02    -.2699E-02    -.3072E-02    -.3408E-02    -.3865E-02    -.4290E-02
                        16.00          .000        -.1387E-02    -.2422E-02    -.2871E-02    -.3346E-02    -.3825E-02    -.4260E-02    -.4858E-02    -.5425E-02
                        18.00          .000        -.1640E-02    -.2877E-02    -.3418E-02    -.3994E-02    -.4578E-02    -.5111E-02    -.5851E-02    -.6560E-02
                        19.00          .000        -.1767E-02    -.3105E-02    -.3692E-02    -.4318E-02    -.4954E-02    -.5536E-02    -.6348E-02    -.7128E-02
                        20.00          .000        -.1893E-02    -.3333E-02    -.3966E-02    -.4642E-02    -.5330E-02    -.5962E-02    -.6844E-02    -.7695E-02
                        21.00          .000        -.2020E-02    -.3561E-02    -.4239E-02    -.4966E-02    -.5707E-02    -.6388E-02    -.7341E-02    -.8262E-02
                        22.00          .000        -.2146E-02    -.3788E-02    -.4513E-02    -.5290E-02    -.6083E-02    -.6813E-02    -.7837E-02    -.8830E-02
                        24.00          .000        -.2400E-02    -.4244E-02    -.5061E-02    -.5938E-02    -.6836E-02    -.7664E-02    -.8831E-02    -.9965E-02
                  </tableData>
               </table>
            </product>
         </function>

         <function name="aero/coefficient/CdDf10L">
            <description>
               Drag Coefficient due to Left Flight Spoilers Deflection
               Positive surface deflection is trailing edge up
               Ultimately, we will feed this left flap pos
            </description>
            <product>
               <property>aero/qbar-psf</property>
               <property>metrics/Sw-sqft</property>
               <table>
                  <independentVar lookup="row">aero/alpha-deg</independentVar>
                  <independentVar lookup="column">fcs/flight-spoiler-pos-deg</independentVar>
                  <tableData>
                                       .000         10.00         20.00         25.00         27.50         30.00         32.50         35.00         40.00
                       -16.00          .000         .7400E-02     .1362E-01     .1488E-01     .1552E-01     .1627E-01     .1710E-01     .1784E-01     .1954E-01
                       -8.000          .000         .4673E-02     .8785E-02     .9635E-02     .1007E-01     .1058E-01     .1115E-01     .1165E-01     .1282E-01
                       -6.000          .000         .3991E-02     .7575E-02     .8323E-02     .8704E-02     .9152E-02     .9655E-02     .1010E-01     .1114E-01
                       -4.000          .000         .3309E-02     .6366E-02     .7011E-02     .7341E-02     .7728E-02     .8166E-02     .8556E-02     .9460E-02
                       -2.000          .000         .2627E-02     .5156E-02     .5699E-02     .5977E-02     .6305E-02     .6676E-02     .7007E-02     .7780E-02
                         .000          .000         .1945E-02     .3947E-02     .4387E-02     .4613E-02     .4882E-02     .5186E-02     .5459E-02     .6099E-02
                        2.000          .000         .1264E-02     .2737E-02     .3075E-02     .3250E-02     .3458E-02     .3696E-02     .3911E-02     .4419E-02
                        4.000          .000         .5817E-03     .1528E-02     .1762E-02     .1886E-02     .2035E-02     .2207E-02     .2363E-02     .2738E-02
                        8.000          .000        -.7819E-03    -.8910E-03    -.8620E-03    -.8412E-03    -.8120E-03    -.7730E-03    -.7331E-03    -.6228E-03
                        9.000          .000        -.1123E-02    -.1496E-02    -.1518E-02    -.1523E-02    -.1524E-02    -.1518E-02    -.1507E-02    -.1463E-02
                        10.00          .000        -.1464E-02    -.2101E-02    -.2174E-02    -.2205E-02    -.2235E-02    -.2263E-02    -.2281E-02    -.2303E-02
                        12.00          .000        -.2146E-02    -.3310E-02    -.3486E-02    -.3568E-02    -.3659E-02    -.3753E-02    -.3829E-02    -.3984E-02
                        14.00          .000        -.2827E-02    -.4519E-02    -.4798E-02    -.4932E-02    -.5082E-02    -.5242E-02    -.5377E-02    -.5664E-02
                        16.00          .000        -.3509E-02    -.5729E-02    -.6111E-02    -.6296E-02    -.6506E-02    -.6732E-02    -.6925E-02    -.7345E-02
                        18.00          .000        -.4191E-02    -.6938E-02    -.7423E-02    -.7659E-02    -.7929E-02    -.8222E-02    -.8474E-02    -.9025E-02
                        19.00          .000        -.4532E-02    -.7543E-02    -.8079E-02    -.8341E-02    -.8641E-02    -.8967E-02    -.9248E-02    -.9866E-02
                        20.00          .000        -.4873E-02    -.8148E-02    -.8735E-02    -.9023E-02    -.9352E-02    -.9712E-02    -.1002E-01    -.1071E-01
                        21.00          .000        -.5214E-02    -.8753E-02    -.9391E-02    -.9705E-02    -.1006E-01    -.1046E-01    -.1080E-01    -.1155E-01
                        22.00          .000        -.5555E-02    -.9357E-02    -.1005E-01    -.1039E-01    -.1078E-01    -.1120E-01    -.1157E-01    -.1239E-01
                        24.00          .000        -.6237E-02    -.1057E-01    -.1136E-01    -.1175E-01    -.1220E-01    -.1269E-01    -.1312E-01    -.1407E-01
                  </tableData>
               </table>
            </product>
         </function>

         <function name="aero/coefficient/CdDf10R">
            <description>
               Drag Coefficient due to Right Flight Spoilers Deflection
               Positive surface deflection is trailing edge up
               Ultimately, we will feed this right flap pos
            </description>
            <product>
               <property>aero/qbar-psf</property>
               <property>metrics/Sw-sqft</property>
               <table>
                  <independentVar lookup="row">aero/alpha-deg</independentVar>
                  <independentVar lookup="column">fcs/flight-spoiler-pos-deg</independentVar>
                  <tableData>
                                       .000         10.00         20.00         25.00         27.50         30.00         32.50         35.00         40.00
                       -16.00          .000         .7400E-02     .1362E-01     .1488E-01     .1552E-01     .1627E-01     .1710E-01     .1784E-01     .1954E-01
                       -8.000          .000         .4673E-02     .8785E-02     .9635E-02     .1007E-01     .1058E-01     .1115E-01     .1165E-01     .1282E-01
                       -6.000          .000         .3991E-02     .7575E-02     .8323E-02     .8704E-02     .9152E-02     .9655E-02     .1010E-01     .1114E-01
                       -4.000          .000         .3309E-02     .6366E-02     .7011E-02     .7341E-02     .7728E-02     .8166E-02     .8556E-02     .9460E-02
                       -2.000          .000         .2627E-02     .5156E-02     .5699E-02     .5977E-02     .6305E-02     .6676E-02     .7007E-02     .7780E-02
                         .000          .000         .1945E-02     .3947E-02     .4387E-02     .4613E-02     .4882E-02     .5186E-02     .5459E-02     .6099E-02
                        2.000          .000         .1264E-02     .2737E-02     .3075E-02     .3250E-02     .3458E-02     .3696E-02     .3911E-02     .4419E-02
                        4.000          .000         .5817E-03     .1528E-02     .1762E-02     .1886E-02     .2035E-02     .2207E-02     .2363E-02     .2738E-02
                        8.000          .000        -.7819E-03    -.8910E-03    -.8620E-03    -.8412E-03    -.8120E-03    -.7730E-03    -.7331E-03    -.6228E-03
                        9.000          .000        -.1123E-02    -.1496E-02    -.1518E-02    -.1523E-02    -.1524E-02    -.1518E-02    -.1507E-02    -.1463E-02
                        10.00          .000        -.1464E-02    -.2101E-02    -.2174E-02    -.2205E-02    -.2235E-02    -.2263E-02    -.2281E-02    -.2303E-02
                        12.00          .000        -.2146E-02    -.3310E-02    -.3486E-02    -.3568E-02    -.3659E-02    -.3753E-02    -.3829E-02    -.3984E-02
                        14.00          .000        -.2827E-02    -.4519E-02    -.4798E-02    -.4932E-02    -.5082E-02    -.5242E-02    -.5377E-02    -.5664E-02
                        16.00          .000        -.3509E-02    -.5729E-02    -.6111E-02    -.6296E-02    -.6506E-02    -.6732E-02    -.6925E-02    -.7345E-02
                        18.00          .000        -.4191E-02    -.6938E-02    -.7423E-02    -.7659E-02    -.7929E-02    -.8222E-02    -.8474E-02    -.9025E-02
                        19.00          .000        -.4532E-02    -.7543E-02    -.8079E-02    -.8341E-02    -.8641E-02    -.8967E-02    -.9248E-02    -.9866E-02
                        20.00          .000        -.4873E-02    -.8148E-02    -.8735E-02    -.9023E-02    -.9352E-02    -.9712E-02    -.1002E-01    -.1071E-01
                        21.00          .000        -.5214E-02    -.8753E-02    -.9391E-02    -.9705E-02    -.1006E-01    -.1046E-01    -.1080E-01    -.1155E-01
                        22.00          .000        -.5555E-02    -.9357E-02    -.1005E-01    -.1039E-01    -.1078E-01    -.1120E-01    -.1157E-01    -.1239E-01
                        24.00          .000        -.6237E-02    -.1057E-01    -.1136E-01    -.1175E-01    -.1220E-01    -.1269E-01    -.1312E-01    -.1407E-01
                  </tableData>
               </table>
            </product>
         </function>

         <function name="aero/coefficient/CdDe">
            <description>
               Drag Coefficient due to Elevator Deflection
               Positive surface deflection is trailing edge down
            </description>
            <product>
               <property>aero/qbar-psf</property>
               <property>metrics/Sw-sqft</property>
               <table>
                  <independentVar lookup="row">aero/alpha-deg</independentVar>
                  <independentVar lookup="column">fcs/elevator-pos-deg</independentVar>
                  <tableData>
                                     -20.00        -15.00        -10.00        -5.000          .000         5.000         10.00         13.00         16.00
                       -16.00         .2202E-01     .1934E-01     .1231E-01     .5667E-02    -.1036E-04    -.4696E-02    -.8421E-02    -.1013E-01    -.1136E-01
                       -8.000         .1583E-01     .1377E-01     .8501E-02     .3765E-02    -.6556E-05    -.2794E-02    -.4617E-02    -.5228E-02    -.5496E-02
                       -6.000         .1428E-01     .1238E-01     .7550E-02     .3289E-02    -.5606E-05    -.2318E-02    -.3666E-02    -.4002E-02    -.4030E-02
                       -4.000         .1273E-01     .1098E-01     .6599E-02     .2814E-02    -.4656E-05    -.1843E-02    -.2715E-02    -.2776E-02    -.2564E-02
                       -2.000         .1118E-01     .9592E-02     .5648E-02     .2338E-02    -.3705E-05    -.1367E-02    -.1764E-02    -.1550E-02    -.1097E-02
                         .000         .9635E-02     .8199E-02     .4697E-02     .1863E-02    -.2753E-05    -.8918E-03    -.8127E-03    -.3242E-03     .3689E-03
                        2.000         .8086E-02     .6806E-02     .3746E-02     .1387E-02    -.1802E-05    -.4163E-03     .1384E-03     .9017E-03     .1835E-02
                        4.000         .6537E-02     .5413E-02     .2794E-02     .9117E-03    -.8506E-06     .5925E-04     .1090E-02     .2128E-02     .3302E-02
                        8.000         .3440E-02     .2627E-02     .8923E-03    -.3936E-04     .1052E-05     .1010E-02     .2992E-02     .4579E-02     .6234E-02
                        9.000         .2666E-02     .1931E-02     .4167E-03    -.2771E-03     .1527E-05     .1248E-02     .3467E-02     .5192E-02     .6967E-02
                        10.00         .1891E-02     .1235E-02    -.5882E-04    -.5149E-03     .2003E-05     .1486E-02     .3943E-02     .5805E-02     .7700E-02
                        12.00         .3425E-03    -.1582E-03    -.1010E-02    -.9905E-03     .2954E-05     .1961E-02     .4894E-02     .7031E-02     .9167E-02
                        14.00        -.1206E-02    -.1551E-02    -.1961E-02    -.1466E-02     .3905E-05     .2437E-02     .5845E-02     .8257E-02     .1063E-01
                        16.00        -.2755E-02    -.2944E-02    -.2912E-02    -.1942E-02     .4855E-05     .2913E-02     .6796E-02     .9483E-02     .1210E-01
                        18.00        -.4304E-02    -.4337E-02    -.3863E-02    -.2417E-02     .5808E-05     .3388E-02     .7747E-02     .1071E-01     .1357E-01
                        19.00        -.5078E-02    -.5033E-02    -.4339E-02    -.2655E-02     .6282E-05     .3626E-02     .8223E-02     .1132E-01     .1430E-01
                        20.00        -.5852E-02    -.5729E-02    -.4814E-02    -.2893E-02     .6758E-05     .3864E-02     .8698E-02     .1193E-01     .1503E-01
                        21.00        -.6627E-02    -.6426E-02    -.5290E-02    -.3130E-02     .7235E-05     .4101E-02     .9174E-02     .1255E-01     .1577E-01
                        22.00        -.7401E-02    -.7122E-02    -.5765E-02    -.3368E-02     .7709E-05     .4339E-02     .9649E-02     .1316E-01     .1650E-01
                        24.00        -.8950E-02    -.8515E-02    -.6717E-02    -.3844E-02     .8660E-05     .4815E-02     .1060E-01     .1439E-01     .1796E-01
                  </tableData>
               </table>
            </product>
         </function>

     </axis>


<!-- ********************************************************************** -->


     <axis name="SIDE">


         <function name="aero/coefficient/Cyb">
            <description>
               Side Force coefficient due to Sideslip(per degree)
                Contributes to damping of Dutch Roll mode
            </description>
            <product>
               <property>aero/qbar-psf</property>
               <property>metrics/Sw-sqft</property>
               <property>aero/beta-deg</property>
               <table>
                  <independentVar lookup="row">aero/alpha-deg</independentVar>
                  <tableData>
                       -16.00        -.9845E-02
                       -8.000        -.9845E-02
                       -6.000        -.9845E-02
                       -4.000        -.9845E-02
                       -2.000        -.9845E-02
                         .000        -.9845E-02
                        2.000        -.9845E-02
                        4.000        -.9845E-02
                        8.000        -.9845E-02
                        9.000        -.9845E-02
                        10.00        -.9845E-02
                        12.00        -.9845E-02
                        14.00        -.9845E-02
                        16.00        -.9845E-02
                        18.00        -.9845E-02
                        19.00        -.9845E-02
                        20.00        -.9845E-02
                        21.00        -.9845E-02
                        22.00        -.9845E-02
                        24.00        -.9845E-02
                  </tableData>
               </table>
            </product>
         </function>

         <function name="aero/coefficient/Cyp">
            <description>
               Side Force Coefficient due to Roll Rate(per degree)
            </description>
            <product>
               <property>velocities/p-aero-rad_sec</property>
               <value>57.29577951</value>
               <property>aero/qbar-psf</property>
               <property>metrics/Sw-sqft</property>
               <property>aero/bi2vel</property>
               <table>
                  <independentVar lookup="row">aero/alpha-deg</independentVar>
                  <tableData>
                       -16.00        -.7244E-02
                       -8.000        -.5371E-02
                       -6.000        -.4708E-02
                       -4.000        -.4022E-02
                       -2.000        -.3327E-02
                         .000        -.2621E-02
                        2.000        -.1909E-02
                        4.000        -.1197E-02
                        8.000         .1963E-03
                        9.000         .5355E-03
                        10.00         .8736E-03
                        12.00         .1528E-02
                        14.00         .2125E-02
                        16.00         .2664E-02
                        18.00         .3136E-02
                        19.00         .3345E-02
                        20.00         .3535E-02
                        21.00         .3644E-02
                        22.00         .3802E-02
                        24.00         .4085E-02
                  </tableData>
               </table>
            </product>
         </function>


         <!-- *************************
              Not calculated by DATCOM+
              *************************
         -->

         <function name="aero/coefficient/Cyr">
            <description>
               Side Force due to Yaw Rate(DATCOM does not calculate)
               Effect is small
            </description>
            <product>
               <property>velocities/r-aero-rad_sec</property>
               <property>aero/qbar-psf</property>
               <property>metrics/Sw-sqft</property>
               <property>aero/bi2vel</property>
               <value>    .000    </value>
            </product>
         </function>


         <!-- *************************
              Not calculated by DATCOM+
              *************************
         -->

         <function name="aero/coefficient/CyDr">
            <description>
               Side Force due to rudder(DATCOM does not calculate)
            </description>
            <product>
               <property>aero/qbar-psf</property>
               <property>metrics/Sw-sqft</property>
               <property>fcs/rudder-pos-deg</property>
               <value>    .000    </value>
            </product>
         </function>


         <!-- *************************
              Not calculated by DATCOM+
              *************************
         -->

         <function name="aero/coefficient/CyDa">
            <description>
               Side Force due to aileron(DATCOM does not calculate)
               Usually neglected
            </description>
            <product>
               <property>aero/qbar-psf</property>
               <property>metrics/Sw-sqft</property>
               <property>fcs/left-aileron-pos-deg</property>
               <value>    .000    </value>
            </product>
         </function>

     </axis>


<!-- ********************************************************************** -->
     <axis name="ROLL">


         <function name="aero/coefficient/Clb">
            <description>
               Roll Moment coefficient due to Beta(per degree)
               Decrease of Clb to small negative value improves Dutch Roll Damping
               High Positive value leads to excessive spiral instability
            </description>
            <product>
               <property>aero/qbar-psf</property>
               <property>metrics/Sw-sqft</property>
               <property>metrics/bw-ft</property>
               <property>aero/beta-deg</property>
               <table>
                  <independentVar lookup="row">aero/alpha-deg</independentVar>
                  <tableData>
                       -16.00         .8286E-03
                       -8.000         .2457E-03
                       -6.000        -.2464E-04
                       -4.000        -.3400E-03
                       -2.000        -.6692E-03
                         .000        -.1006E-02
                        2.000        -.1349E-02
                        4.000        -.1691E-02
                        8.000        -.2354E-02
                        9.000        -.2517E-02
                        10.00        -.2678E-02
                        12.00        -.2979E-02
                        14.00        -.3231E-02
                        16.00        -.3427E-02
                        18.00        -.3558E-02
                        19.00        -.3599E-02
                        20.00        -.3620E-02
                        21.00        -.3626E-02
                        22.00        -.3658E-02
                        24.00        -.3660E-02
                  </tableData>
               </table>
            </product>
         </function>

         <function name="aero/coefficient/Clp">
            <description>
               Roll Moment coefficient due to roll rate(per degree)
               Clp alone determines damping-in-roll characteristics
            </description>
            <product>
               <property>aero/qbar-psf</property>
               <property>metrics/Sw-sqft</property>
               <property>metrics/bw-ft</property>
               <property>aero/bi2vel</property>
               <property>velocities/p-aero-rad_sec</property>
               <table>
                  <independentVar lookup="row">aero/alpha-deg</independentVar>
                  <tableData>
                       -16.00        -.2092E-02
                       -8.000        -.5865E-02
                       -6.000        -.6611E-02
                       -4.000        -.6977E-02
                       -2.000        -.7133E-02
                         .000        -.7239E-02
                        2.000        -.7265E-02
                        4.000        -.7153E-02
                        8.000        -.6725E-02
                        9.000        -.6594E-02
                        10.00        -.6365E-02
                        12.00        -.5577E-02
                        14.00        -.4638E-02
                        16.00        -.3638E-02
                        18.00        -.2516E-02
                        19.00        -.1907E-02
                        20.00        -.1272E-02
                        21.00        -.1516E-02
                        22.00        -.1655E-02
                        24.00         .7012E-04
                  </tableData>
               </table>
            </product>
         </function>

         <function name="aero/coefficient/Clr">
            <description>
               Roll Moment coefficient due to yaw rate(per degree)
               Considerable effect on Spiral mode. Large
               positive values leads to strong sprial instability.
            </description>
            <product>
               <property>aero/qbar-psf</property>
               <property>metrics/Sw-sqft</property>
               <property>metrics/bw-ft</property>
               <property>aero/bi2vel</property>
               <property>velocities/r-aero-rad_sec</property>
               <table>
                  <independentVar lookup="row">aero/alpha-deg</independentVar>
                  <tableData>
                       -16.00        -.4157E-02
                       -8.000        -.2889E-02
                       -6.000        -.2321E-02
                       -4.000        -.1692E-02
                       -2.000        -.1042E-02
                         .000        -.3774E-03
                        2.000         .2966E-03
                        4.000         .9663E-03
                        8.000         .2240E-02
                        9.000         .2541E-02
                        10.00         .2833E-02
                        12.00         .3366E-02
                        14.00         .3798E-02
                        16.00         .4131E-02
                        18.00         .4352E-02
                        19.00         .4416E-02
                        20.00         .4447E-02
                        21.00         .4444E-02
                        22.00         .4498E-02
                        24.00         .4473E-02
                  </tableData>
               </table>
            </product>
         </function>

         <function name="aero/coefficient/ClDs4">
            <description>
               Roll Moment coefficient due to Left Double Slotted Flaps Deflection
            </description>
            <product>
               <property>aero/qbar-psf</property>
               <property>metrics/Sw-sqft</property>
               <property>metrics/bw-ft</property>
               <table>
                  <independentVar lookup="row">fcs/left-aileron-pos-deg</independentVar>
                  <tableData>
                       -70.00          .000
                       -40.00          .000
                       -20.00          .000
                       -10.00          .000
                         .000          .000
                        10.00          .000
                        20.00          .000
                        40.00          .000
                        70.00          .000
                  </tableData>
               </table>
            </product>
         </function>

         <function name="aero/coefficient/CldF1">
            <description>
               Roll Moment Coefficient due to Asymetrical Plain Flaps Deflection
               calculated as difference between left and right flap lift coef,
               times distance from centerline to MAC of surface.
            </description>
            <product>
               <value>     14.69</value>
               <difference>
                  <property>aero/coefficient/CLdF1R</property>
                  <property>aero/coefficient/CLdF1L</property>
               </difference>
            </product>
         </function>

         <function name="aero/coefficient/CldF2">
            <description>
               Roll Moment Coefficient due to Asymetrical Single Slotted Flaps Deflection
               calculated as difference between left and right flap lift coef,
               times distance from centerline to MAC of surface.
            </description>
            <product>
               <value>     30.17</value>
               <difference>
                  <property>aero/coefficient/CLdF2R</property>
                  <property>aero/coefficient/CLdF2L</property>
               </difference>
            </product>
         </function>

         <function name="aero/coefficient/CldF6">
            <description>
               Roll Moment Coefficient due to Asymetrical Leading Edge Flaps Deflection
               calculated as difference between left and right flap lift coef,
               times distance from centerline to MAC of surface.
            </description>
            <product>
               <value>     27.24</value>
               <difference>
                  <property>aero/coefficient/CLdF6R</property>
                  <property>aero/coefficient/CLdF6L</property>
               </difference>
            </product>
         </function>

         <function name="aero/coefficient/CldF7">
            <description>
               Roll Moment Coefficient due to Asymetrical Leading Edge Slats Deflection
               calculated as difference between left and right flap lift coef,
               times distance from centerline to MAC of surface.
            </description>
            <product>
               <value>     66.89</value>
               <difference>
                  <property>aero/coefficient/CLdF7R</property>
                  <property>aero/coefficient/CLdF7L</property>
               </difference>
            </product>
         </function>

         <function name="aero/coefficient/CldF9">
            <description>
               Roll Moment Coefficient due to Asymetrical Ground Spoilers Deflection
               calculated as difference between left and right flap lift coef,
               times distance from centerline to MAC of surface.
            </description>
            <product>
               <value>     24.12</value>
               <difference>
                  <property>aero/coefficient/CLdF9R</property>
                  <property>aero/coefficient/CLdF9L</property>
               </difference>
            </product>
         </function>

         <function name="aero/coefficient/CldF10">
            <description>
               Roll Moment Coefficient due to Asymetrical Flight Spoilers Deflection
               calculated as difference between left and right flap lift coef,
               times distance from centerline to MAC of surface.
            </description>
            <product>
               <value>     61.25</value>
               <difference>
                  <property>aero/coefficient/CLdF10R</property>
                  <property>aero/coefficient/CLdF10L</property>
               </difference>
            </product>
         </function>


         <!-- *************************
              Not calculated by DATCOM+
              *************************
         -->

         <function name="aero/coefficient/ClDr">
            <description>
               Roll moment due to rudder(DATCOM does not calculate)
               Usually insignificant in dynamic stability considerations
               but is used in autopilot work
            </description>
            <product>
               <property>metrics/bw-ft</property>
               <property>aero/qbar-psf</property>
               <property>metrics/Sw-sqft</property>
               <property>fcs/rudder-pos-deg</property>
               <value>    .000    </value>
            </product>
         </function>

     </axis>


<!-- ********************************************************************** -->


     <axis name="PITCH">


         <function name="aero/coefficient/Cm_basic">
            <description>
               Basic_Pitch_moment_coefficient
            </description>
            <product>
               <property>aero/qbar-psf</property>
               <property>metrics/Sw-sqft</property>
               <property>metrics/cbarw-ft</property>
               <table>
                  <independentVar lookup="row">aero/alpha-deg</independentVar>
                  <tableData>
                       -16.00         .6734
                       -8.000         .4030
                       -6.000         .3252
                       -4.000         .2481
                       -2.000         .1745
                         .000         .1028
                        2.000         .3325E-01
                        4.000        -.3565E-01
                        8.000        -.1681
                        9.000        -.1990
                        10.00        -.2276
                        12.00        -.2683
                        14.00        -.3425
                        16.00        -.3946
                        18.00        -.4360
                        19.00        -.4541
                        20.00        -.4670
                        21.00        -.4768
                        22.00        -.4881
                        24.00        -.4881
                  </tableData>
               </table>
            </product>
         </function>

         <function name="aero/coefficient/Cmq">
            <description>
               Pitch moment coefficient due to pitch rate(per degree)
                Pitch Damping Derivative
               Very important to Short Period damping of oscillations
            </description>
            <product>
               <property>aero/qbar-psf</property>
               <property>metrics/Sw-sqft</property>
               <property>metrics/cbarw-ft</property>
               <property>aero/ci2vel</property>
               <property>velocities/q-aero-rad_sec</property>
               <table>
                  <independentVar lookup="row">aero/alpha-deg</independentVar>
                  <tableData>
                       -16.00        -.1604
                       -8.000        -.1604
                       -6.000        -.1604
                       -4.000        -.1604
                       -2.000        -.1604
                         .000        -.1604
                        2.000        -.1604
                        4.000        -.1604
                        8.000        -.1604
                        9.000        -.1604
                        10.00        -.1604
                        12.00        -.1604
                        14.00        -.1604
                        16.00        -.1604
                        18.00        -.1604
                        19.00        -.1604
                        20.00        -.1604
                        21.00        -.1604
                        22.00        -.1604
                        24.00        -.1604
                  </tableData>
               </table>
            </product>
         </function>

         <function name="aero/coefficient/Cmadot">
            <description>
               Pitch moment coefficient due to AOA rate(per degree)
               Negitive Cmad increase Short Period damping
            </description>
            <product>
               <property>aero/qbar-psf</property>
               <property>metrics/Sw-sqft</property>
               <property>metrics/cbarw-ft</property>
               <property>aero/ci2vel</property>
               <property>aero/alphadot-deg_sec</property>
               <table>
                  <independentVar lookup="row">aero/alpha-deg</independentVar>
                  <tableData>
                       -16.00        -.4114E-01
                       -8.000        -.4114E-01
                       -6.000        -.4114E-01
                       -4.000        -.4114E-01
                       -2.000        -.4114E-01
                         .000        -.4114E-01
                        2.000        -.4114E-01
                        4.000        -.4114E-01
                        8.000        -.4114E-01
                        9.000        -.4114E-01
                        10.00        -.4092E-01
                        12.00        -.3881E-01
                        14.00        -.4114E-01
                        16.00        -.4114E-01
                        18.00        -.4114E-01
                        19.00        -.4114E-01
                        20.00        -.4114E-01
                        21.00        -.4114E-01
                        22.00        -.4114E-01
                        24.00        -.4114E-01
                  </tableData>
               </table>
            </product>
         </function>

         <function name="aero/coefficient/CmDe">
            <description>
               Pitch moment coefficient due to elevator deflection
               Positive surface deflection is trailing edge down
            </description>
            <product>
               <property>aero/qbar-psf</property>
               <property>metrics/Sw-sqft</property>
               <property>metrics/cbarw-ft</property>
               <table>
                  <independentVar lookup="row">fcs/elevator-pos-deg</independentVar>
                  <tableData>
                       -20.00         .2894
                       -15.00         .2590
                       -10.00         .1771
                       -5.000         .8863E-01
                         .000        -.1773E-03
                        5.000        -.8863E-01
                        10.00        -.1771
                        13.00        -.2280
                        16.00        -.2727
                  </tableData>
               </table>
            </product>
         </function>

         <function name="aero/coefficient/CmDf1L">
            <description>
               Pitch moment coefficient due to left Plain Flaps Deflection
               Positive surface deflection is trailing edge down
               Ultimately, we will feed this left flap pos
            </description>
            <product>
               <property>aero/qbar-psf</property>
               <property>metrics/Sw-sqft</property>
               <property>metrics/cbarw-ft</property>
               <table>
                  <independentVar lookup="row">fcs/flap-pos-deg</independentVar>
                  <tableData>
                       -20.00         .1447
                       -15.00         .1295
                       -10.00         .8854E-01
                       -5.000         .4431E-01
                         .000          .000
                        5.000        -.4431E-01
                        10.00        -.8854E-01
                        13.00        -.1140
                        16.00        -.1363
                  </tableData>
               </table>
            </product>
         </function>

         <function name="aero/coefficient/CmDf1R">
            <description>
               Pitch moment coefficient due to right Plain Flaps Deflection
               Positive surface deflection is trailing edge down
               Ultimately, we will feed this right flap pos
            </description>
            <product>
               <property>aero/qbar-psf</property>
               <property>metrics/Sw-sqft</property>
               <property>metrics/cbarw-ft</property>
               <table>
                  <independentVar lookup="row">fcs/flap-pos-deg</independentVar>
                  <tableData>
                       -20.00         .1447
                       -15.00         .1295
                       -10.00         .8854E-01
                       -5.000         .4431E-01
                         .000          .000
                        5.000        -.4431E-01
                        10.00        -.8854E-01
                        13.00        -.1140
                        16.00        -.1363
                  </tableData>
               </table>
            </product>
         </function>

         <function name="aero/coefficient/CmDf2L">
            <description>
               Pitch moment coefficient due to left Single Slotted Flaps Deflection
               Positive surface deflection is trailing edge down
               Ultimately, we will feed this left flap pos
            </description>
            <product>
               <property>aero/qbar-psf</property>
               <property>metrics/Sw-sqft</property>
               <property>metrics/cbarw-ft</property>
               <table>
                  <independentVar lookup="row">fcs/flap-pos-deg</independentVar>
                  <tableData>
                         .000          .000
                        5.000        -.1872E-01
                        10.00        -.3901E-01
                        15.00        -.5994E-01
                        20.00        -.8405E-01
                        25.00        -.1018
                        30.00        -.1167
                        35.00        -.1284
                        40.00        -.1339
                  </tableData>
               </table>
            </product>
         </function>

         <function name="aero/coefficient/CmDf2R">
            <description>
               Pitch moment coefficient due to right Single Slotted Flaps Deflection
               Positive surface deflection is trailing edge down
               Ultimately, we will feed this right flap pos
            </description>
            <product>
               <property>aero/qbar-psf</property>
               <property>metrics/Sw-sqft</property>
               <property>metrics/cbarw-ft</property>
               <table>
                  <independentVar lookup="row">fcs/flap-pos-deg</independentVar>
                  <tableData>
                         .000          .000
                        5.000        -.1872E-01
                        10.00        -.3901E-01
                        15.00        -.5994E-01
                        20.00        -.8405E-01
                        25.00        -.1018
                        30.00        -.1167
                        35.00        -.1284
                        40.00        -.1339
                  </tableData>
               </table>
            </product>
         </function>

         <function name="aero/coefficient/CmDf6L">
            <description>
               Pitch moment coefficient due to left Leading Edge Flaps Deflection
               Positive surface deflection is trailing edge down
               Ultimately, we will feed this left flap pos
            </description>
            <product>
               <property>aero/qbar-psf</property>
               <property>metrics/Sw-sqft</property>
               <property>metrics/cbarw-ft</property>
               <table>
                  <independentVar lookup="row">fcs/leading-edge-flap-pos-deg</independentVar>
                  <tableData>
                         .000          .000
                        10.00         .8883E-03
                        20.00         .1777E-02
                        30.00         .2665E-02
                  </tableData>
               </table>
            </product>
         </function>

         <function name="aero/coefficient/CmDf6R">
            <description>
               Pitch moment coefficient due to right Leading Edge Flaps Deflection
               Positive surface deflection is trailing edge down
               Ultimately, we will feed this right flap pos
            </description>
            <product>
               <property>aero/qbar-psf</property>
               <property>metrics/Sw-sqft</property>
               <property>metrics/cbarw-ft</property>
               <table>
                  <independentVar lookup="row">fcs/leading-edge-flap-pos-deg</independentVar>
                  <tableData>
                         .000          .000
                        10.00         .8883E-03
                        20.00         .1777E-02
                        30.00         .2665E-02
                  </tableData>
               </table>
            </product>
         </function>

         <function name="aero/coefficient/CmDf7L">
            <description>
               Pitch moment coefficient due to left Leading Edge Slats Deflection
               Positive surface deflection is trailing edge down
               Ultimately, we will feed this left flap pos
            </description>
            <product>
               <property>aero/qbar-psf</property>
               <property>metrics/Sw-sqft</property>
               <property>metrics/cbarw-ft</property>
               <table>
                  <independentVar lookup="row">fcs/leading-edge-slat-pos-deg</independentVar>
                  <tableData>
                         .000          .000
                        5.000        -.2148E-02
                        10.00         .9978E-03
                        20.00         .4813E-02
                  </tableData>
               </table>
            </product>
         </function>

         <function name="aero/coefficient/CmDf7R">
            <description>
               Pitch moment coefficient due to right Leading Edge Slats Deflection
               Positive surface deflection is trailing edge down
               Ultimately, we will feed this right flap pos
            </description>
            <product>
               <property>aero/qbar-psf</property>
               <property>metrics/Sw-sqft</property>
               <property>metrics/cbarw-ft</property>
               <table>
                  <independentVar lookup="row">fcs/leading-edge-slat-pos-deg</independentVar>
                  <tableData>
                         .000          .000
                        5.000        -.2148E-02
                        10.00         .9978E-03
                        20.00         .4813E-02
                  </tableData>
               </table>
            </product>
         </function>

         <function name="aero/coefficient/CmDf9L">
            <description>
               Pitch moment coefficient due to left Ground Spoilers Deflection
               Positive surface deflection is trailing edge up
               Ultimately, we will feed this left flap pos
            </description>
            <product>
               <property>aero/qbar-psf</property>
               <property>metrics/Sw-sqft</property>
               <property>metrics/cbarw-ft</property>
               <table>
                  <independentVar lookup="row">fcs/ground-spoiler-pos-deg</independentVar>
                  <tableData>
                         .000          .000
                        10.00         .9897E-02
                        20.00         .1904E-01
                        30.00         .2425E-01
                        40.00         .2758E-01
                        50.00         .2952E-01
                        60.00         .3059E-01
                        70.00         .3190E-01
                        80.00         .3293E-01
                  </tableData>
               </table>
            </product>
         </function>

         <function name="aero/coefficient/CmDf9R">
            <description>
               Pitch moment coefficient due to right Ground Spoilers Deflection
               Positive surface deflection is trailing edge up
               Ultimately, we will feed this right flap pos
            </description>
            <product>
               <property>aero/qbar-psf</property>
               <property>metrics/Sw-sqft</property>
               <property>metrics/cbarw-ft</property>
               <table>
                  <independentVar lookup="row">fcs/ground-spoiler-pos-deg</independentVar>
                  <tableData>
                         .000          .000
                        10.00         .9897E-02
                        20.00         .1904E-01
                        30.00         .2425E-01
                        40.00         .2758E-01
                        50.00         .2952E-01
                        60.00         .3059E-01
                        70.00         .3190E-01
                        80.00         .3293E-01
                  </tableData>
               </table>
            </product>
         </function>

         <function name="aero/coefficient/CmDf10L">
            <description>
               Pitch moment coefficient due to left Flight Spoilers Deflection
               Positive surface deflection is trailing edge up
               Ultimately, we will feed this left flap pos
            </description>
            <product>
               <property>aero/qbar-psf</property>
               <property>metrics/Sw-sqft</property>
               <property>metrics/cbarw-ft</property>
               <table>
                  <independentVar lookup="row">fcs/flight-spoiler-pos-deg</independentVar>
                  <tableData>
                         .000          .000
                        10.00         .2537E-01
                        20.00         .4578E-01
                        25.00         .5075E-01
                        27.50         .5313E-01
                        30.00         .5523E-01
                        32.50         .5747E-01
                        35.00         .5951E-01
                        40.00         .6357E-01
                  </tableData>
               </table>
            </product>
         </function>

         <function name="aero/coefficient/CmDf10R">
            <description>
               Pitch moment coefficient due to right Flight Spoilers Deflection
               Positive surface deflection is trailing edge up
               Ultimately, we will feed this right flap pos
            </description>
            <product>
               <property>aero/qbar-psf</property>
               <property>metrics/Sw-sqft</property>
               <property>metrics/cbarw-ft</property>
               <table>
                  <independentVar lookup="row">fcs/flight-spoiler-pos-deg</independentVar>
                  <tableData>
                         .000          .000
                        10.00         .2537E-01
                        20.00         .4578E-01
                        25.00         .5075E-01
                        27.50         .5313E-01
                        30.00         .5523E-01
                        32.50         .5747E-01
                        35.00         .5951E-01
                        40.00         .6357E-01
                  </tableData>
               </table>
            </product>
         </function>

     </axis>


<!-- ********************************************************************** -->


     <axis name="YAW">


         <function name="aero/coefficient/Cnb">
            <description>
               Yaw moment coefficient due to sideslip(per degree)
               Determines Dutch Roll and Spiral characteristics
               Prevents side-slip and yawing moments
            </description>
            <product>
               <property>aero/qbar-psf</property>
               <property>metrics/Sw-sqft</property>
               <property>metrics/bw-ft</property>
               <property>aero/beta-deg</property>
               <table>
                  <independentVar lookup="row">aero/alpha-deg</independentVar>
                  <tableData>
                       -16.00         .1267E-02
                       -8.000         .1267E-02
                       -2.000         .1267E-02
                        4.000         .1267E-02
                        10.00         .1267E-02
                        16.00         .1267E-02
                        20.00         .1267E-02
                        24.00         .1267E-02
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                  </tableData>
               </table>
            </product>
         </function>

         <function name="aero/coefficient/Cnp">
            <description>
               Yaw moment coefficient due to roll rate(per degree)
               Reduces Dutch Roll damping
               positive value desireable
            </description>
            <product>
               <property>aero/qbar-psf</property>
               <property>metrics/Sw-sqft</property>
               <property>metrics/bw-ft</property>
               <property>aero/bi2vel</property>
               <property>velocities/p-aero-rad_sec</property>
               <table>
                  <independentVar lookup="row">aero/alpha-deg</independentVar>
                  <tableData>
                       -16.00         .2575E-02
                       -8.000         .1624E-02
                       -2.000         .6068E-03
                        4.000        -.4221E-03
                        10.00        -.1441E-02
                        16.00        -.2389E-02
                        20.00        -.2858E-02
                        24.00        -.3104E-02
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                  </tableData>
               </table>
            </product>
         </function>

         <function name="aero/coefficient/Cnr">
            <description>
               Yaw Moment coefficient due to yaw rate(per degree)
               Main contributor to damping of Dutch Roll
            </description>
            <product>
               <property>aero/qbar-psf</property>
               <property>metrics/Sw-sqft</property>
               <property>metrics/bw-ft</property>
               <property>aero/bi2vel</property>
               <property>velocities/r-aero-rad_sec</property>
               <table>
                  <independentVar lookup="row">aero/alpha-deg</independentVar>
                  <tableData>
                       -16.00        -.1738E-02
                       -8.000        -.1989E-02
                       -2.000        -.2135E-02
                        4.000        -.2221E-02
                        10.00        -.2242E-02
                        16.00        -.2208E-02
                        20.00        -.2164E-02
                        24.00        -.2105E-02
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                  </tableData>
               </table>
            </product>
         </function>

         <function name="aero/coefficient/CnDf1">
            <description>
               Yaw Moment Coefficient due to Asymetrical Plain Flaps Deflection
               calculated as difference between left and right flap drag coef,
               times distance from centerline to MAC of surface.
            </description>
            <product>
               <value>     14.69</value>
               <difference>
                  <property>aero/coefficient/CdDf1R</property>
                  <property>aero/coefficient/CdDf1L</property>
               </difference>
            </product>
         </function>

         <function name="aero/coefficient/CnDf2">
            <description>
               Yaw Moment Coefficient due to Asymetrical Single Slotted Flaps Deflection
               calculated as difference between left and right flap drag coef,
               times distance from centerline to MAC of surface.
            </description>
            <product>
               <value>     30.17</value>
               <difference>
                  <property>aero/coefficient/CdDf2R</property>
                  <property>aero/coefficient/CdDf2L</property>
               </difference>
            </product>
         </function>

         <function name="aero/coefficient/CnDf6">
            <description>
               Yaw Moment Coefficient due to Asymetrical Leading Edge Flaps Deflection
               calculated as difference between left and right flap drag coef,
               times distance from centerline to MAC of surface.
            </description>
            <product>
               <value>     27.24</value>
               <difference>
                  <property>aero/coefficient/CdDf6R</property>
                  <property>aero/coefficient/CdDf6L</property>
               </difference>
            </product>
         </function>

         <function name="aero/coefficient/CnDf7">
            <description>
               Yaw Moment Coefficient due to Asymetrical Leading Edge Slats Deflection
               calculated as difference between left and right flap drag coef,
               times distance from centerline to MAC of surface.
            </description>
            <product>
               <value>     66.89</value>
               <difference>
                  <property>aero/coefficient/CdDf7R</property>
                  <property>aero/coefficient/CdDf7L</property>
               </difference>
            </product>
         </function>

         <function name="aero/coefficient/CnDf9">
            <description>
               Yaw Moment Coefficient due to Asymetrical Ground Spoilers Deflection
               calculated as difference between left and right flap drag coef,
               times distance from centerline to MAC of surface.
            </description>
            <product>
               <value>     24.12</value>
               <difference>
                  <property>aero/coefficient/CdDf9R</property>
                  <property>aero/coefficient/CdDf9L</property>
               </difference>
            </product>
         </function>

         <function name="aero/coefficient/CnDf10">
            <description>
               Yaw Moment Coefficient due to Asymetrical Flight Spoilers Deflection
               calculated as difference between left and right flap drag coef,
               times distance from centerline to MAC of surface.
            </description>
            <product>
               <value>     61.25</value>
               <difference>
                  <property>aero/coefficient/CdDf10R</property>
                  <property>aero/coefficient/CdDf10L</property>
               </difference>
            </product>
         </function>

         <function name="aero/coefficient/CnDa">
            <description>
               Yaw Moment coefficient due to plain flap aileron deflection
            </description>
            <product>
               <property>aero/qbar-psf</property>
               <property>metrics/Sw-sqft</property>
               <property>metrics/bw-ft</property>
               <!-- table>
                  <independentVar lookup="row">aero/alpha-deg</independentVar>
                  <tableData>
                                     -70.00        -40.00        -20.00        -10.00         0.000         10.00         20.00         40.00         70.00
                       -16.00          .000          .000          .000          .000          .000          .000          .000          .000          .000
                       -2.000          .000          .000          .000          .000          .000          .000          .000          .000          .000
                        8.000          .000          .000          .000          .000          .000          .000          .000          .000          .000
                        14.00          .000          .000          .000          .000          .000          .000          .000          .000          .000
                        20.00          .000          .000          .000          .000          .000          .000          .000          .000          .000
                        24.00          .000          .000          .000          .000          .000          .000          .000          .000          .000
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                  </tableData>
               </table -->
            </product>
         </function>


         <!-- ******************************************************
              CnDr is not calculated by DATCOM+, but a default value
              is supplied
              ******************************************************-->

         <function name="aero/coefficient/CnDr">
            <description>
               Yaw Coefficient due to rudder(DATCOM does not calculate)
               High value for controllablity, low value
               for good dynamic stability
            </description>
            <product>
               <property>aero/qbar-psf</property>
               <property>metrics/Sw-sqft</property>
               <property>metrics/bw-ft</property>
               <property>fcs/rudder-pos-deg</property>
               <value>  -.1047E-02</value>
            </product>
         </function>


     </axis>


<!-- ********************************************************************** -->


      <function name="aero/elev_hinge_moment_ft_lbs">
         <description>
            Elevator hinge moment in ft-lbs
            HM = q * S * Cbar * ( Ch0 + Cha*alpha + Chd*delta )
            Positive causes trailing edge down movement
            Ch0 is used to artifically trim HM to zero
         </description>
         <product>
               <property>aero/qbar-psf</property>
               <property>metrics/Sw-sqft</property>
            <value>   244.7    </value>	<!-- surface area of elevator -->
            <value>   6.882    </value>	<!-- MAC of elevator -->
            <sum>
 <!--
               <property>aero/Ch0_elev</property>
 -->
               <product>
                  <property>aero/alpha-deg</property>
                  <table>                            	<!-- Ch-alpha -->
                     <independentVar lookup="row">
                     aero/alpha-deg</independentVar>
                     <tableData>
                          -16.00    	  -.4724E-02
                          -8.000    	  -.4724E-02
                          -2.000    	  -.4724E-02
                           4.000    	  -.4724E-02
                           10.00    	  -.8319E-02
                           16.00    	  -.8008E-02
                           20.00    	  -.8008E-02
                           24.00    	  -.8008E-02
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                     </tableData>
                  </table>
               </product>
               <product>
                  <property>fcs/elevator-pos-deg</property>
                  <table>                            	<!-- Ch-delta elevator -->
                     <independentVar lookup="row">
                     fcs/elevator-pos-deg</independentVar>
                     <tableData>
                          -20.00    	  -.8319E-02
                          -15.00    	  -.8048E-02
                          -10.00    	  -.8008E-02
                          -5.000    	  -.8008E-02
                            .000    	  -.8008E-02
                           5.000    	  -.8008E-02
                           10.00    	  -.8008E-02
                           13.00    	  -.8022E-02
                           16.00    	  -.8069E-02
                     </tableData>
                  </table>
               </product>
            </sum>
         </product>
      </function>

   </aerodynamics>
